<?xml version="1.0" encoding="UTF-8"?>
<neuroml xmlns="http://morphml.org/neuroml/schema" xmlns:meta="http://morphml.org/metadata/schema" xmlns:mml="http://morphml.org/morphml/schema" xmlns:bio="http://morphml.org/biophysics/schema" xmlns:cml="http://morphml.org/channelml/schema" xmlns:net="http://morphml.org/networkml/schema" xmlns:xsi="http://www.w3.org/2001/XMLSchema-instance" xsi:schemaLocation="http://morphml.org/neuroml/schema  http://neuroml.svn.sourceforge.net/viewvc/neuroml/trunk/web/NeuroMLFiles/Schemata/v1.8.1/Level3/NeuroML_Level3_v1.8.1.xsd" lengthUnits="micron">

    <cells>
        <cell name="Golgi_270111_C3">

            <meta:notes>Cell morphology generated by neuroConstruct from file: No9-270111-C3-2D-soma.ASC
V3 text file written for MicroBrightField products.
</meta:notes>

            <mml:segments>

                <mml:segment id="0" name="RootSegment" cable="0">
                    <mml:proximal x="0.0" y="0.0" z="0.0" diameter="24.0"/>
                    <mml:distal x="0.0" y="0.0" z="0.0" diameter="24.0"/>    <mml:properties>

                    <meta:property tag="comment" value="Root Segment, parent of all dendrites, etc. Should be edited to create biologically accurate soma based on soma outline"/>

                </mml:properties>

                </mml:segment>

                <mml:segment id="31" name="DendriteRed_1_R" parent="0" cable="1">
                    <mml:proximal x="-4.01" y="-3.7700005" z="-0.03" diameter="1.18"/>
                    <mml:distal x="-4.23" y="-4.0699997" z="-0.03" diameter="1.18"/>    <mml:properties>

                    <meta:property tag="comment" value="First segment of new sub branch"/>

                </mml:properties>

                </mml:segment>

                <mml:segment id="32" name="DendriteRed_11672" parent="31" cable="1">
                    <mml:distal x="-4.23" y="-4.1400003" z="-0.03" diameter="1.18"/>
                </mml:segment>

                <mml:segment id="33" name="DendriteRed_11673" parent="32" cable="1">
                    <mml:distal x="-4.38" y="-4.88" z="0.17" diameter="1.18"/>
                </mml:segment>

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
            </mml:segments>

            <mml:cables>

                <mml:cable id="0" name="Soma">
                    <meta:group>all</meta:group>
                    <meta:group>soma_group</meta:group>
                    <meta:group>mossy</meta:group>
                </mml:cable>

                <mml:cable id="1" name="SecDendriteRed_1_R">
                    <meta:properties>

                    <meta:property tag="numberInternalDivisions" value="4"/>

                    </meta:properties>

                    <meta:group>all</meta:group>
                    <meta:group>dendrite_group</meta:group>
                    <meta:group>colour_Red</meta:group>
                    <meta:group>mossy</meta:group>
                </mml:cable>

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
            </mml:cables>

            <!--Adding the biophysical parameters-->

            <biophysics units="Physiological Units">

                <bio:mechanism name="CALC" type="Ion Concentration">    <!--Note: not adding gmax for Ion Concentration.
Value for scaling factor to apply to current to get change in conc should be
 determined from ChannelML file for the CaPool...-->

                </bio:mechanism>

                <bio:mechanism name="CALC_ca2" type="Ion Concentration">    <!--Note: not adding gmax for Ion Concentration.
Value for scaling factor to apply to current to get change in conc should be
 determined from ChannelML file for the CaPool...-->

                </bio:mechanism>

                <bio:mechanism name="Ca_HVA" type="Channel Mechanism">
                    <bio:parameter name="gmax" value="0.46">
                        <bio:group>soma_group</bio:group>
                    </bio:parameter>
                </bio:mechanism>

                <bio:mechanism name="Ca_LVA" type="Channel Mechanism">
                    <bio:parameter name="gmax" value="0.25">
                        <bio:group>soma_group</bio:group>
                    </bio:parameter>
                </bio:mechanism>

                <bio:mechanism name="HCN1" type="Channel Mechanism">
                    <bio:parameter name="gmax" value="0.05">
                        <bio:group>soma_group</bio:group>
                    </bio:parameter>
                </bio:mechanism>

                <bio:mechanism name="HCN2" type="Channel Mechanism">
                    <bio:parameter name="gmax" value="0.08">
                        <bio:group>soma_group</bio:group>
                    </bio:parameter>
                </bio:mechanism>

                <bio:mechanism name="KA" type="Channel Mechanism">
                    <bio:parameter name="gmax" value="8.0">
                        <bio:group>soma_group</bio:group>
                    </bio:parameter>
                </bio:mechanism>

                <bio:mechanism name="KBK" type="Channel Mechanism">
                    <bio:parameter name="gmax" value="9.0">
                        <bio:group>soma_group</bio:group>
                    </bio:parameter>
                </bio:mechanism>

                <bio:mechanism name="KM" type="Channel Mechanism">
                    <bio:parameter name="gmax" value="1.0">
                        <bio:group>soma_group</bio:group>
                    </bio:parameter>
                </bio:mechanism>

                <bio:mechanism name="KSK" type="Channel Mechanism">
                    <bio:parameter name="gmax" value="38.0">
                        <bio:group>soma_group</bio:group>
                    </bio:parameter>
                </bio:mechanism>

                <bio:mechanism name="KV" type="Channel Mechanism">
                    <bio:parameter name="gmax" value="32.0">
                        <bio:group>soma_group</bio:group>
                    </bio:parameter>
                </bio:mechanism>

                <bio:mechanism name="LeakConductance" type="Channel Mechanism" passive_conductance="true">
                    <bio:parameter name="e" value="-55.0">
                        <bio:group>all</bio:group>
                    </bio:parameter>
                    <bio:parameter name="gmax" value="0.06">
                        <bio:group>all</bio:group>
                    </bio:parameter>
                </bio:mechanism>

                <bio:mechanism name="NaP" type="Channel Mechanism">
                    <bio:parameter name="gmax" value="0.19">
                        <bio:group>soma_group</bio:group>
                    </bio:parameter>
                </bio:mechanism>

                <bio:mechanism name="NaR" type="Channel Mechanism">
                    <bio:parameter name="gmax" value="1.7">
                        <bio:group>soma_group</bio:group>
                    </bio:parameter>
                </bio:mechanism>

                <bio:mechanism name="NaT" type="Channel Mechanism">
                    <bio:parameter name="gmax" value="48.0">
                        <bio:group>soma_group</bio:group>
                    </bio:parameter>
                </bio:mechanism>

                <bio:spec_capacitance>
                    <bio:parameter value="1.0">
                        <bio:group>all</bio:group>
                    </bio:parameter>
                </bio:spec_capacitance>

                <bio:spec_axial_resistance>
                    <bio:parameter value="0.29">
                        <bio:group>all</bio:group>
                    </bio:parameter>
                </bio:spec_axial_resistance>

                <bio:init_memb_potential>
                    <bio:parameter value="-60.0">
                        <bio:group>all</bio:group>
                    </bio:parameter>
                </bio:init_memb_potential></biophysics>

            <connectivity>
                <net:potential_syn_loc synapse_type="MultiDecaySyn">
                    <net:group>parfiber</net:group>

                    <net:group>mossy</net:group>
                </net:potential_syn_loc>

                <net:potential_syn_loc synapse_type="STPSynApical">
                    <net:group>parfiber</net:group>
                </net:potential_syn_loc>
            </connectivity>

        </cell>
    </cells>
</neuroml>
